# Функция Bosom
# Целевая функция:
f(x, y) := (exp(-((x - 4)^2 + (y - 4)^2)^2/1000) + exp(-((x + 4)^2 + (y + 4)^2)^2/1000) + 0.15*exp(-((x + 4)^2 + (y + 4)^2)^2) + 0.15*exp(-((x - 4)^2 + (y - 4)^2)^2))
# Проверка значений в точках:
f(-4, -4) = 1.15
f(4, 4) = 1.15
f(-4.0001, -4.0001) = 1.15
f(4.0001, 4.0001) = 1.15
f(6.33755, 10.0335) = 0.173276
# График:
# [component: inputs f]
# [component: inputs f]
