# Функция Gaussian quartic
# Целевая функция:
F(x, n) := sum(x[i]^4*(i + 1), i = 0 .. n - 1) + rnorm(1, 0, 1)[0]
# Перевод на трехмерный случай:
f(x, y) :=
    X[0] ← x
    X[1] ← y
    Z ← F(X, 2)
    Z
# Проверка значений в точках:
f(0, 0) = -0.24053
f(0.0001, 0.0001) = -2.19735
f(1.82905, -1.81438) = 32.1244
# График:
# [component: inputs f]
# [component: inputs f]
