# Функция Розенброка
# Целевая функция:
F(x, n) := sum(x[i]^2/4000, i = 0 .. n - 1) - product(cos(x[j]/sqrt(j + 1)), j = 0 .. n - 1) + 1
# Перевод на трехмерный случай:
f(x, y) :=
    X[0] ← x
    X[1] ← y
    Z ← F(X, 2)
    Z
# Проверка значений в точках:
f(0, 0) = 0
f(0.0001, 0.0001) = 7.505e-9
f(7.82863, 12.7969) = 1.07984
# График:
# [component: inputs f]
# [component: inputs f]
