# Функция Химмельблау
# Целевая функция:
f(x, y) := (x^2 + y - 11)^2 + (x + y^2 - 7)^2
# Проверка значений в точках:
f(3, 2) = 0
f(-2.8051183, 3.131312) = 1.24206e-11
f(3.0001, 2.0001) = 7.40024e-7
f(-3.779310, -3.283186) = 3.79786e-12
f(1.8744, 0.39062) = 75.0842
f(3.584428, -1.848126) = 8.89438e-12
# График:
# [component: inputs f]
# [component: inputs f]
