# Перевернутая функция Розенброка
# Целевая функция:
f(x, y) := -100/((100*(x^2 - y) + (1 - x)^2) + 600)
# Проверка значений в точках:
f(0.00990099, 5) = -0.990196
f(0.0001, 5.0001) = -0.990199
f(4.95843, 4.1078) = -0.0375447
# График:
# [component: inputs f]
# [component: inputs f]
