# Функция Катникова
# Целевая функция:
A := 0.8
f(x, y) := 0.5*(x^2 + y^2)*(2*A + A*cos(1.5*x)*cos(3.14*y) + A*cos(sqrt(5)*x)*cos(3.5*y))
# Проверка значений в точках:
f(0, 0) = 0
f(0.0001, .0001) = 3.2e-8
f(-1.44256, -3.16906) = 11.5792
# График:
# [component: inputs f]
# [component: inputs f]
