# Функция Растригина с изменением коэффициентов
# Целевая функция:
Kx := 1.5
Ky := 0.8
α := π/2
A(x, y) := x*cos(α) - y*sin(α)
B(x, y) := x*sin(α) + y*cos(α)
f(x, y) := (0.1*Kx*A(x, y))^2 + (0.1*Ky*B(x, y))^2 - 4*cos(0.8*Kx*A(x, y)) - 4*cos(0.8*Ky*B(x, y)) + 8
# Проверка значений в точках:
f(0, 0) = 0
f(0.0001, 0.0001) = 3.7281e-8
f(-7.1266, 11.4531) = 10.3461
# График:
# [component: inputs f]
# [component: inputs f]
