# Функция Развернутый гипер-эллипсоид
# Целевая функция:
F(x, n) := sum(sum(x[j], j = 0 .. i)^2, i = 0 .. n - 1)
# Перевод на трехмерный случай:
f(x, y) :=
    X[0] ← x
    X[1] ← y
    Z ← F(X, 2)
    Z
# Проверка значений в точках:
f(0, 0) = 0
f(0.0001, 0.0001) = 5e-8
f(2, 3) = 29
# График:
# [component: inputs f]
# [component: inputs f]
