# Функция ReverseGriewank
# Целевая функция:
f(x, y) := (1 - sin(sqrt(x^2 + y^2))^2)/(1 + 0.001*(x^2 + y^2))
# Проверка значений в точках:
f(0, 0) = 1
f(0.0001, 0.0001) = 1
f(-3.26381, -0.836133) = 0.938426
# График:
# [component: inputs f]
# [component: inputs f]
