# Whitley F101
# VMHL_Result=-x*sin(sqrt(fabs(x-(y+47.)/2.)))-(y+47)*sin(sqrt(fabs(x/2.+47+y)));
# Целевая функция:
f(x, y) := -x*sin(sqrt(|x - (y + 47)/1|)) - (y + 47)*sin(sqrt(|x/2 + 47 + y|))
# Проверка значений в точках:
f(512, 404.2319) = -959.641
f(-488.6326, 512.0001) = 898.562
f(-169.488, -458.027) = -83.4418
# График:
# [component: inputs f]
# [component: inputs f]
