# Функция Гипер-эллипсоид
# Целевая функция:
F(x, n) := sum(((i + 1)*x[i])^2, i = 0 .. n - 1)
# Перевод на трехмерный случай:
f(x, y) :=
    X[0] ← x
    X[1] ← y
    Z ← F(X, 2)
    Z
# Проверка значений в точках:
f(0, 0) = 0
f(0.0001, 0.0001) = 5e-8
f(1.39903, 1.96538) = 17.4082
# График:
# [component: inputs f]
# [component: inputs f]
