# Функция Multiextremal
# Целевая функция:
f(x) := 0.05*(x - 1)^2 + (3 - 2.9*e^(-2.77257*x^2))*(1 - cos(x*(4 - 50*e^(-2.77257*x^2))))
# Проверка значений в точках:
f(0.954451617) = 0.000103742
f(0.69667) = 0.00460062
f(-1.15873) = 6.08017
# График:
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