# Функция Multiextremal2
# Целевая функция:
f(x) := 1 - 0.5*cos(1.5*(10*x - 0.3))*cos(31.4*x) + 0.5*cos(sqrt(5)*10*x)*cos(35*x)
# Проверка значений в точках:
f(-0.993263306711) = 1.93374
f(-0.993263) = 1.93374
f(-1.15873) = 0.591608
# График:
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