# Multiextremal3
# Целевая функция:
# VMHL_Result=x*x*fabs(sin(2.*x))+y*y*fabs(sin(2.*y))-1./(5.*x*x+5.*y*y+0.2)+5.;
f(x, y) := x^2*|sin(2*x)| + y^2*|sin(2*y)| - 1/(5*x^2 + 5*y^2 + 0.2) + 5
# Проверка значений в точках:
f(0, 0) = 0
f(0.0001, 0.0001) = 2.5e-6
f(2.68873, 0.520861) = 10.8962
# График:
# [component: inputs f]
# [component: inputs f]
