# Multiextremal4
# Целевая функция:
# 0.5*(x*x+x*y+y*y)*(1.+0.5*cos(1.5*x)*cos(3.2*x*y)*cos(3.14*y)+0.5*cos(2.2*x)*cos(4.8*x*y)*cos(3.5*y))
f(x, y) := 0.5*(x^2 + x*y + y^2)*(1 + 0.5*cos(1.5*x)*cos(3.2*x*y)*cos(3.14*y) + 0.5*cos(2.2*x)*cos(4.8*x*y)*cos(3.5*y))
# Проверка значений в точках:
f(0, 0) = 0
f(0.0001, 0.0001) = 3e-8
f(2.6604, 2.56989) = 8.82491
# График:
# [component: inputs f]
# [component: inputs f]
