# Мультипликативная потенциальная функция
# Целевая функция:
z(v) := -1/((v - 1)^2 + 0.2) - 1/(2*(v - 2)^2 + 0.15) - 1/(3*(v - 3)^2 + 0.3)
f(x, y) := -z(x)*z(y)
# Проверка значений в точках:
f(2, 2) = -60.8873
f(2.0001, 2.0001) = -60.886
f(0.520743, -4.96242) = -0.113219
# График:
# [component: inputs f]
# [component: inputs f]
