# Функция Растригина
# Целевая функция:
F(x, n) := 10*n + sum(x[i]^2 - 10*cos(2*π*x[i]), i = 0 .. n - 1)
# Перевод на трехмерный случай:
f(x, y) :=
    X[0] ← x
    X[1] ← y
    Z ← F(X, 2)
    Z
# Проверка значений в точках:
f(0, 0) = 0
f(0.0001, 0.0001) = 3.96784e-6
# График:
# [component: inputs f]
# [component: inputs f]
