# Функция Растригина новгородская
# Целевая функция:
F(x, n) := sum(x[i]^2 - cos(18*x[i]^2), i = 0 .. n - 1) + n
# Перевод на трехмерный случай:
f(x, y) :=
    X[0] ← x
    X[1] ← y
    Z ← F(X, 2)
    Z
# Проверка значений в точках:
f(0, 0) = 0
f(0.0001, 0.0001) = 2e-8
f(-1.15942, 1.19803) = 3.42324
# График:
# [component: inputs f]
# [component: inputs f]
