# Функция Растригина с изменением коэффициентов
# Целевая функция:
f(x, y) := 0.1*x^2 + 0.1*y^2 - 4*cos(0.8*x) - 4*cos(0.8*y) + 8
# Проверка значений в точках:
f(0, 0) = 0
f(0.0001, 0.0001) = 2.76e-8
f(12.4601, 5.36642) = 31.4576
# График:
# [component: inputs f]
# [component: inputs f]
