# Функция ReverseGriewank
# Целевая функция:
f(x, y) := 1/(((x^2 + y^2)/200) - cos(x)*cos(y/sqrt(2)) + 2)
# Проверка значений в точках:
f(0, 0) = 1
f(0.0001, 0.0001) = 1
f(9.39884, -8.80345) = 0.26129
# График:
# [component: inputs f]
# [component: inputs f]
