# Функция Розенброка
# Целевая функция:
F(x, n) := sum(100*(x[i + 1] - x[i]^2)^2 + (1 - x[i])^2, i = 0 .. n - 2)
# Перевод на трехмерный случай:
f(x, y) :=
    X[0] ← x
    X[1] ← y
    Z ← F(X, 2)
    Z
# Проверка значений в точках:
f(0, 0) = 1
f(0.0001, 0.0001) = 0.999801
# График:
# [component: inputs f]
# [component: inputs f]
