# Функция Швефеля
# Целевая функция:
F(x, n) := 418.9829*n - sum(x[i]*sin(sqrt(|x[i]|)), i = 0 .. n - 1)
# Перевод на трехмерный случай:
f(x, y) :=
    X[0] ← x
    X[1] ← y
    Z ← F(X, 2)
    Z
# Проверка значений в точках:
f(420.9687, 420.9687) = 2.54557e-5
f(1, 1) = 836.283
f(420.968746, 420.968746) = 2.54551e-5
f(169.715, 410.499) = 357.17
# График:
# [component: inputs f]
# [component: inputs f]
