# ShekelsFoxholes
# Целевая функция:
A := [
    -32, -16, 0, 16, 32, -32, -16, 0, 16, 32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;
    -32, -32, -32, -32, -32, -16, -16, -16, -16, -16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]
K := 500
f(x, y) := 1/(1/K + sum(1/((j + 1) + (x - A[0, j])^6 + (y - A[1, j])^6), j = 0 .. 24))
# Проверка значений в точках:
f(-32, -32) = 0.998004
f(-32.0001, 32.0001) = 20.1535
f(-1.42869, -6.40351) = 496.009
# График:
# [component: inputs f]
# [component: inputs f]
