# Функция ReverseGriewank
# Целевая функция:
f(x, y) := (1 - sin(sqrt(x^2 + y^2))^2)/(1 + 0.001*(x^2 + y^2))
# Проверка значений в точках:
f(0, 0) = 1
f(0.0001, 0.0001) = 1
f(9.39884, -8.80345) = 0.777191
# График:
# [component: inputs f]
# [component: inputs f]
