# Функция Step (модифицированная версия De Jong 3)
# Целевая функция:
F(x, n) :=
    sum(trunc(x[i])^2, i = 0 .. n - 1) if sum(|trunc(x[i])|, i = 0 .. n - 1) ≠ 0
    sum(|x[i]|, i = 0 .. n - 1) - 1 otherwise
# Перевод на трехмерный случай:
f(x, y) :=
    X[0] ← x
    X[1] ← y
    Z ← F(X, 2)
    Z
# Проверка значений в точках:
f(0, 0) = -1
f(0.0001, 0.0001) = -0.9998
f(-0.413264, -0.141813) = -0.444923
# График:
# [component: inputs f]
# [component: inputs f]
# [component: inputs f]
