# Аддитивная потенциальная функция
# Целевая функция:
z(v) := -1/((v - 1)^2 + 0.2) - 1/(2*(v - 2)^2 + 0.15) - 1/(3*(v - 3)^2 + 0.3)
f(x, y) := z(x) + z(y)
# Проверка значений в точках:
f(2, 2) = -15.6061
f(2.0001, 2.0001) = -15.6059
f(-2.87701, -0.443955) = -0.644411
# График:
# [component: inputs f]
# [component: inputs f]
