# Функция Ackley
# Целевая функция:
F(x, n) := 20 + e - 20*e^(-0.2*sqrt(1/n*sum(x[i]^2, i = 0 .. n - 1))) - e^(1/n*sum(cos(2*π*x[i]), i = 0 .. n - 1))
# Перевод на трехмерный случай:
f(x, y) :=
    X[0] ← x
    X[1] ← y
    Z ← F(X, 2)
    Z
# Проверка значений в точках:
f(0, 0) = -4.44089e-16
f(0.0001, 0.0001) = 0.000400533
# График:
# [component: inputs f]
# [component: inputs f]
